// SBML level 2 version 4

model model_11111111111111111111111()

  // Compartments:
  compartment uVol = 1;

  // Species:
  species RAF in uVol = 81.94;
  species RAF_P in uVol = 18.06;
  species MEK in uVol = 272.22;
  species MEK_PP in uVol = 7.85;
  species ERK in uVol = 288.5;
  species ERK_P in uVol = 0;
  species ERK_PP in uVol = 2.93;
  species ras_gtp in uVol = 333;
  species PKC in uVol = 0;
  species PKCP in uVol = 0;
  species ras_gtp in uVol = 0;
  species MEK_P in uVol = 0;

  // Reactions:
  SR1: RAF => RAF_P; kcat_SR1*ras_gtp*RAF/(Km_SR1 + RAF); SR1 is "Raf activation by Ras";  // modifiers: ras_gtp
    kcat_SR1 = 0.25; Km_SR1 = 8;
  SR2: MEK => MEK_PP; kcat_SR2*RAF_P*MEK/(Km_SR2 + MEK); SR2 is "MEK -> MEK_PP";  // modifiers: RAF_P
    kcat_SR2 = 0.25; Km_SR2 = 8;
  SR3: MEK_PP => MEK; V_SR3*MEK_PP/(Km_SR3 + MEK_PP); SR3 is "MEK_PP -> MEK";
    V_SR3 = 0.25; Km_SR3 = 8;
  SR4: ERK => ERK_PP; kcat_SR4*MEK_PP*ERK/(Km_SR4 + ERK); SR4 is "ERK -> ERKPP";  // modifiers: MEK_PP
    kcat_SR4 = 0.25; Km_SR4 = 8;
  SR5: ERK_PP => ERK; V_SR5*ERK_PP/(Km_SR5 + ERK_PP); SR5 is "ERK_PP -> ERK";
    V_SR5 = 0.25; Km_SR5 = 8;
  R10: ERK_P -> ERK_PP; kcat_R10*MEK_PP*ERK_P/(Km_R10 + ERK_P);  // modifiers: MEK_PP
    kcat_R10 = 1; Km_R10 = 1;
  R18: RAF_P -> RAF; V_R18*RAF_P/(Km_R18 + RAF_P);
    V_R18 = 1; Km_R18 = 1;
  R11: ERK_PP -> ERK_P; V_R11*ERK_PP/(Km_R11 + ERK_PP);
    V_R11 = 1; Km_R11 = 1;
  R1: PKC -> PKCP; kcat_R1*ras_gtp*PKC/(Km_R1 + PKC);  // modifiers: ras_gtp
    kcat_R1 = 1; Km_R1 = 1;
  R9: ERK -> ERK_P; kcat_R9*MEK_PP*ERK/(Km_R9 + ERK);  // modifiers: MEK_PP
    kcat_R9 = 1; Km_R9 = 1;
  R5: MEK -> MEK_P; kcat_R5*RAF_P*MEK/(Km_R5 + MEK);  // modifiers: RAF_P
    kcat_R5 = 1; Km_R5 = 1;
  R15: ERK -> ERK_PP; kcat_R15*ERK_PP*ERK/(Km_R15 + ERK);
    kcat_R15 = 1; Km_R15 = 1;
  R3: RAF -> RAF_P; kcat_R3*PKCP*RAF/(Km_R3 + RAF);  // modifiers: PKCP
    kcat_R3 = 1; Km_R3 = 1;
  R14: ERK_PP -> ERK_PP; kcat_R14*ERK_PP*ERK_PP/(Km_R14 + ERK_P);  // modifiers: ERK
    kcat_R14 = 1; Km_R14 = 1;
  R17: MEK -> MEK_PP; kcat_R17*ERK_PP*MEK/(Km_R17 + MEK);  // modifiers: ERK_PP
    kcat_R17 = 1; Km_R17 = 1;
  R4: RAF -> RAF_P; kcat_R4*ERK_PP*RAF/(Km_R4 + RAF);  // modifiers: ERK_PP
    kcat_R4 = 1; Km_R4 = 1;
  R6: MEK_P -> MEK_PP; kcat_R6*RAF_P*MEK_P/(Km_R6 + MEK_P);  // modifiers: RAF_P
    kcat_R6 = 1; Km_R6 = 1;
  R13: MEK_PP -> MEK; kcat_R13*ERK_PP*MEK_PP/(Km_R13 + MEK_PP);  // modifiers: ERK_PP
    kcat_R13 = 1; Km_R13 = 1;
  R8: MEK_P -> MEK; V_R8*MEK_P/(Km_R8 + MEK_P);
    V_R8 = 1; Km_R8 = 1;
  R16: RAF_P -> RAF; kcat_R16*ERK_PP*RAF_P/(Km_R16 + RAF_P);  // modifiers: ERK_PP
    kcat_R16 = 1; Km_R16 = 1;
  R2: PKCP -> PKC; V_R2*PKCP/(Km_R2 + PKCP);
    V_R2 = 1; Km_R2 = 1;
  R12: ERK_P -> ERK; V_R12*ERK_P/(Km_R12 + ERK_P);
    V_R12 = 1; Km_R12 = 1;
  R7: MEK_PP -> MEK_P; V_R7*MEK_PP/(Km_R7 + MEK_PP);
    V_R7 = 1; Km_R7 = 1;

  // Unit definitions:
  unit substance = 1e-9 mole; substance is "nanomole";
end
