// SBML level 2 version 4

model model_0010000001()

  // Compartments:
  compartment cell = 1;

  // Species:
  species SOS in cell = 200/cell;
  species SOS_allo_RasGDP in cell = 0;
  species SOS_allo_RasGTP in cell = 0;
  species RasGDP in cell = 900/cell;
  species RasGTP in cell = 100/cell;
  species GEF in cell = 0;
  species GAP in cell = 125/cell;
  species iGAP in cell = 275/cell;

  // Reactions:
  SOS_allo_RasGTP_complexation: RasGTP + SOS -> SOS_allo_RasGTP; k2*SOS*RasGTP;
    k2 = 1;
  GAP_activation_by_RasGTP: iGAP -> GAP; k7cat*iGAP*RasGTP/(K7m + iGAP);  // modifiers: RasGTP
    k7cat = 1; K7m = 1;
end
