// SBML level 2 version 4

model model_1110001010()

  // Compartments:
  compartment cell = 1;

  // Species:
  species SOS in cell = 200/cell;
  species SOS_allo_RasGDP in cell = 0;
  species SOS_allo_RasGTP in cell = 0;
  species RasGDP in cell = 900/cell;
  species RasGTP in cell = 100/cell;
  species GEF in cell = 0;
  species GAP in cell = 125/cell;
  species iGAP in cell = 275/cell;
  species SOS_allo_RasGDP in cell = 0;

  // Reactions:
  Ras_activation_by_SOS_allo_RasGDP: RasGDP -> RasGTP; k4cat*RasGDP*SOS_allo_RasGDP/(K4m + RasGDP);  // modifiers: SOS_allo_RasGDP
    k4cat = 1; K4m = 1;
end
