// SBML level 2 version 4

model model_1111111111()

  // Compartments:
  compartment cell = 1;

  // Species:
  species SOS in cell = 200/cell;
  species SOS_allo_RasGDP in cell = 0;
  species SOS_allo_RasGTP in cell = 0;
  species RasGDP in cell = 900/cell;
  species RasGTP in cell = 100/cell;
  species GEF in cell = 0;
  species GAP in cell = 125/cell;
  species iGAP in cell = 275/cell;
  species GEF in cell = 0;
  species SOS_allo_RasGDP in cell = 0;
  species RaGTP in cell = 0;
  species GAP in cell = 0;

  // Reactions:
  SOS_allo_RasGTP_complexation: RasGTP + SOS -> SOS_allo_RasGTP; k2*SOS*RasGTP;
    k2 = 1;
  Ras_activation_by_SOS_allo_RasGTP: RasGDP -> RasGTP; k3cat*RasGDP*SOS_allo_RasGTP/(K3m + RasGDP);  // modifiers: SOS_allo_RasGTP
    k3cat = 1; K3m = 1;
  SOS_allo_RasGTP_decomplexation: SOS_allo_RasGTP -> RasGTP + SOS; d2*SOS_allo_RasGTP;
    d2 = 1;
  Ras_activation_by_GEF: RasGDP -> RasGTP; k6cat*RasGDP*GEF/(K6m + RasGDP);  // modifiers: GEF
    k6cat = 1; K6m = 1;
  Ras_activation_by_SOS: RasGDP -> RasGTP; k8cat*RasGDP*SOS/(K8m + RasGDP);  // modifiers: SOS
    k8cat = 1; K8m = 1;
  Ras_activation_by_SOS_allo_RasGDP: RasGDP -> RasGTP; k4cat*RasGDP*SOS_allo_RasGDP/(K4m + RasGDP);  // modifiers: SOS_allo_RasGDP
    k4cat = 1; K4m = 1;
  SOS_allo_RasGDP_decomplexation: SOS_allo_RasGDP -> RasGDP + SOS; d1*SOS_allo_RasGDP;
    d1 = 1;
  SOS_allo_RasGDP_complexation: RasGDP + SOS -> SOS_allo_RasGDP; k1*SOS*RasGDP;
    k1 = 1;
  Ras_inactivation_by_GAP: RaGTP -> RasGDP; k5cat*RasGTP*GAP/(K5m + RasGTP);  // modifiers: GAP
    k5cat = 1; K5m = 1;
  GAP_activation_by_RasGTP: iGAP -> GAP; k7cat*iGAP*RasGTP/(K7m + iGAP);  // modifiers: RasGTP
    k7cat = 1; K7m = 1;
end
