// SBML level 2 version 4

model ERK_pathway_without_feedback()

  // Compartments:
  compartment uVol = 1;

  // Species:
  species RAF in uVol = 81.94; RAF is "Mos";
  species RAF_P in uVol = 18.06; RAF_P is "Mos_P";
  species PKC in uVol = 100;
  species PKC_P in uVol = 0;
  species MEK in uVol = 272.22;
  species MEK_P in uVol = 0;
  species MEK_PP in uVol = 7.85;
  species ERK in uVol = 288.5;
  species ERK_P in uVol = 0;
  species ERK_PP in uVol = 2.93;
  species ras_gtp in uVol = 333;

  // Reactions:
  SR1: RAF => RAF_P; SR1_kcat*ras_gtp*RAF/(SR1_Km + RAF); SR1 is "Raf activation by Ras";  // modifiers: ras_gtp
    SR1_kcat = 0.25; SR1_Km = 8;
  SR2: MEK => MEK_PP; SR2_kcat*RAF_P*MEK/(SR2_Km + MEK); SR2 is "MEK -> MEK_PP";  // modifiers: RAF_P
    SR2_kcat = 0.25; SR2_Km = 8;
  SR3: MEK_PP => MEK; SR3_V*MEK_PP/(SR3_Km + MEK_PP); SR3 is "MEK_PP -> MEK";
    SR3_V = 0.25; SR3_Km = 8;
  SR4: ERK => ERK_PP; SR4_kcat*MEK_PP*ERK/(SR4_Km + ERK); SR4 is "ERK -> ERK_PP";  // modifiers: MEK_PP
    SR4_kcat = 0.25; SR4_Km = 8;
  SR5: ERK_PP => ERK; SR5_V*ERK_PP/(SR5_Km + ERK_PP); SR5 is "ERK_PP -> ERK";
    SR5_V = 0.25; SR5_Km = 8;
  PKC_ras_gtp_PKCP: PKC => PKCP; PKC_ras_gtp_PKCP_kcat*ras_gtp*PKC/(PKC_ras_gtp_PKCP_Km + PKC); PKC_ras_gtp_PKCP is "PKC --ras_gtp--> PKCP";  // modifiers: ras_gtp
    PKC_ras_gtp_PKCP_kcat = 0.25; PKC_ras_gtp_PKCP_Km = 8;
  PKCP_PKC: PKCP => PKC; PKCP_PKC_V*PKCP/(PKCP_PKC_Km + PKCP); PKCP_PKC is "PKCP ---> PKC";
    PKCP_PKC_V = 0.25; PKCP_PKC_Km = 8;
  RAF_PKCP_RAF_P: RAF => RAF_P; RAF_PKCP_RAF_P_kcat*PKCP*RAF/(RAF_PKCP_RAF_P_Km + RAF); RAF_PKCP_RAF_P is "RAF --PKCP--> RAF_P";  // modifiers: PKCP
    RAF_PKCP_RAF_P_kcat = 0.25; RAF_PKCP_RAF_P_Km = 8;
  RAF_ERK_PP_RAF_P: RAF => RAF_P; RAF_ERK_PP_RAF_P_kcat*ERK_PP*RAF/(RAF_ERK_PP_RAF_P_Km + RAF); RAF_ERK_PP_RAF_P is "RAF --ERK_PP--> RAF_P";  // modifiers: ERK_PP
    RAF_ERK_PP_RAF_P_kcat = 0.25; RAF_ERK_PP_RAF_P_Km = 8;
  MEK_RAF_P_MEK_P: MEK => MEK_P; MEK_RAF_P_MEK_P_kcat*RAF_P*MEK/(MEK_RAF_P_MEK_P_Km + MEK); MEK_RAF_P_MEK_P is "MEK --RAF_P--> MEK_P";  // modifiers: RAF_P
    MEK_RAF_P_MEK_P_kcat = 0.25; MEK_RAF_P_MEK_P_Km = 8;
  MEK_P_RAF_P_MEK_PP: MEK_P => MEK_PP; MEK_P_RAF_P_MEK_PP_kcat*RAF_P*MEK_P/(MEK_P_RAF_P_MEK_PP_Km + MEK_P); MEK_P_RAF_P_MEK_PP is "MEK_P --RAF_P--> MEK_PP";  // modifiers: RAF_P
    MEK_P_RAF_P_MEK_PP_kcat = 0.25; MEK_P_RAF_P_MEK_PP_Km = 8;
  MEK_PP_MEK_P: MEK_PP => MEK_P; MEK_PP_MEK_P_V*MEK_PP/(MEK_PP_MEK_P_Km + MEK_PP); MEK_PP_MEK_P is "MEK_PP ---> MEK_P";
    MEK_PP_MEK_P_V = 0.25; MEK_PP_MEK_P_Km = 8;
  MEK_P_MEK: MEK_P => MEK; MEK_P_MEK_V*MEK_P/(MEK_P_MEK_Km + MEK_P); MEK_P_MEK is "MEK_P ---> MEK";
    MEK_P_MEK_V = 0.25; MEK_P_MEK_Km = 8;
  ERK_MEK_PP_ERK_P: ERK => ERK_P; ERK_MEK_PP_ERK_P_kcat*MEK_PP*ERK/(ERK_MEK_PP_ERK_P_Km + ERK); ERK_MEK_PP_ERK_P is "ERK --MEK_PP--> ERK_P";  // modifiers: MEK_PP
    ERK_MEK_PP_ERK_P_kcat = 0.25; ERK_MEK_PP_ERK_P_Km = 8;
  ERK_P_MEK_PP_ERK_PP: ERK_P => ERK_PP; ERK_P_MEK_PP_ERK_PP_kcat*MEK_PP*ERK_P/(ERK_P_MEK_PP_ERK_PP_Km + ERK_P); ERK_P_MEK_PP_ERK_PP is "ERK_P --MEK_PP--> ERK_PP";  // modifiers: MEK_PP
    ERK_P_MEK_PP_ERK_PP_kcat = 0.25; ERK_P_MEK_PP_ERK_PP_Km = 8;
  ERK_PP_ERK_P: ERK_PP => ERK_P; ERK_PP_ERK_P_V*ERK_PP/(ERK_PP_ERK_P_Km + ERK_PP); ERK_PP_ERK_P is "ERK_PP ---> ERK_P";
    ERK_PP_ERK_P_V = 0.25; ERK_PP_ERK_P_Km = 8;
  ERK_P_ERK: ERK_P => ERK; ERK_P_ERK_V*ERK_P/(ERK_P_ERK_Km + ERK_P); ERK_P_ERK is "ERK_P ---> ERK";
    ERK_P_ERK_V = 0.25; ERK_P_ERK_Km = 8;
  MEK_PP_ERK_PP_MEK: MEK_PP => MEK; MEK_PP_ERK_PP_MEK_kcat*ERK_PP*MEK_PP/(MEK_PP_ERK_PP_MEK_Km + MEK_PP); MEK_PP_ERK_PP_MEK is "MEK_PP --ERK_PP--> MEK";  // modifiers: ERK_PP
    MEK_PP_ERK_PP_MEK_kcat = 0.25; MEK_PP_ERK_PP_MEK_Km = 8;
  ERK_PP_ERK_PP_ERK: ERK_PP => ERK_PP; ERK_PP_ERK_PP_ERK_kcat*ERK_PP*ERK_PP/(ERK_PP_ERK_PP_ERK_Km + ERK_P); ERK_PP_ERK_PP_ERK is "ERK_PP --ERK_PP--> ERK";  // modifiers: ERK
    ERK_PP_ERK_PP_ERK_kcat = 0.25; ERK_PP_ERK_PP_ERK_Km = 8;
  ERK_ERK_PP_ERK_PP: ERK => ERK_PP; ERK_ERK_PP_ERK_PP_kcat*ERK_PP*ERK/(ERK_ERK_PP_ERK_PP_Km + ERK); ERK_ERK_PP_ERK_PP is "ERK --ERK_PP--> ERK_PP";
    ERK_ERK_PP_ERK_PP_kcat = 0.25; ERK_ERK_PP_ERK_PP_Km = 8;
  RAF_P_EKR_PP_RAF: RAF_P => RAF; RAF_P_EKR_PP_RAF_kcat*EKR_PP*RAF_P/(RAF_P_EKR_PP_RAF_Km + RAF_P); RAF_P_EKR_PP_RAF is "RAF_P --EKR_PP--> RAF";  // modifiers: EKR_PP
    RAF_P_EKR_PP_RAF_kcat = 0.25; RAF_P_EKR_PP_RAF_Km = 8;
  MEK_EKR_PP_MEK_PP: MEK => MEK_PP; MEK_EKR_PP_MEK_PP_kcat*EKR_PP*MEK/(MEK_EKR_PP_MEK_PP_Km + MEK); MEK_EKR_PP_MEK_PP is "MEK --EKR_PP--> MEK_PP";  // modifiers: EKR_PP
    MEK_EKR_PP_MEK_PP_kcat = 0.25; MEK_EKR_PP_MEK_PP_Km = 8;
  RAF_P_RAF: RAF_P => RAF; RAF_P_RAF_V*RAF_P/(RAF_P_RAF_Km + RAF_P); RAF_P_RAF is "RAF_P ---> RAF";
    RAF_P_RAF_V = 0.25; RAF_P_RAF_Km = 8;

  // Unit definitions:
  unit substance = 1e-9 mole; substance is "nanomole";
end
