// SBML level 2 version 4

model ERK_pathway_without_feedback()

  // Compartments:
  compartment uVol = 1;

  // Species:
  species RAF in uVol = 81.94; RAF is "Mos";
  species RAF_P in uVol = 18.06; RAF_P is "Mos-P";
  species MEK in uVol = 272.22; MEK is "Mek1";
  species MEK_PP in uVol = 7.85; MEK_PP is "Mek1-PP";
  species ERK in uVol = 288.5; ERK is "Erk2";
  species ERK_PP in uVol = 2.93; ERK_PP is "Erk2-PP";
  species ras_gtp in uVol = 333; ras_gtp is "Ras-GTP";

  // Reactions:
  SR1: RAF => RAF_P; SR1_kcat*ras_gtp*RAF/(SR1_Km + RAF); SR1 is "Raf activation by Ras";  // modifiers: ras_gtp
    SR1_kcat = 0.25; SR1_Km = 8;
  SR2: MEK => MEK_PP; SR2_kcat*RAF_P*MEK/(SR2_Km + MEK); SR2 is "MEK -> MEK_PP";  // modifiers: RAF_P
    SR2_kcat = 0.25; SR2_Km = 8;
  SR3: MEK_PP => MEK; SR3_V*MEK_PP/(SR3_Km + MEK_PP); SR3 is "MEK_PP -> MEK";
    SR3_V = 0.25; SR3_Km = 8;
  SR4: ERK => ERK_PP; SR4_kcat*MEK_PP*ERK/(SR4_Km + ERK); SR4 is "ERK -> ERKPP";  // modifiers: MEK_PP
    SR4_kcat = 0.25; SR4_Km = 8;
  SR5: ERK_PP => ERK; SR5_V*ERK_PP/(SR5_Km + ERK_PP); SR5 is "ERK_PP -> ERK";
    SR5_V = 0.25; SR5_Km = 8;

  // Unit definitions:
  unit substance = 1e-9 mole; substance is "nanomole";
end
