// SBML level 2 version 4

model model_11111000000000000000000()

  // Compartments:
  compartment uVol = 1;

  // Species:
  species RAF in uVol = 81.94; RAF is "Mos";
  species RAF_P in uVol = 18.06; RAF_P is "Mos-P";
  species MEK in uVol = 272.22; MEK is "Mek1";
  species MEK_PP in uVol = 7.85; MEK_PP is "Mek1-PP";
  species ERK in uVol = 288.5; ERK is "Erk2";
  species ERK_P in uVol = 0;
  species ERK_PP in uVol = 2.93; ERK_PP is "Erk2-PP";
  species ras_gtp in uVol = 333; ras_gtp is "Ras-GTP";

  // Reactions:
  SR1: RAF => RAF_P; kcat_SR1*ras_gtp*RAF/(Km_SR1 + RAF); SR1 is "Raf activation by Ras";  // modifiers: ras_gtp
    kcat_SR1 = 0.25; Km_SR1 = 8;
  SR2: MEK => MEK_PP; kcat_SR2*RAF_P*MEK/(Km_SR2 + MEK); SR2 is "MEK -> MEK_PP";  // modifiers: RAF_P
    kcat_SR2 = 0.25; Km_SR2 = 8;
  SR3: MEK_PP => MEK; V_SR3*MEK_PP/(Km_SR3 + MEK_PP); SR3 is "MEK_PP -> MEK";
    V_SR3 = 0.25; Km_SR3 = 8;
  SR4: ERK => ERK_PP; kcat_SR4*MEK_PP*ERK/(Km_SR4 + ERK); SR4 is "ERK -> ERKPP";  // modifiers: MEK_PP
    kcat_SR4 = 0.25; Km_SR4 = 8;
  SR5: ERK_PP => ERK; V_SR5*ERK_PP/(Km_SR5 + ERK_PP); SR5 is "ERK_PP -> ERK";
    V_SR5 = 0.25; Km_SR5 = 8;

  // Unit definitions:
  unit substance = 1e-9 mole; substance is "nanomole";
end
